VAX := READPRN("D:\Storage\Andrew\Учёба\Основы электроники\Лаб_1\BAX.LIB")
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VAX[:, 0] = [
    0; 0.019996; 0.039992; 0.059988; 0.079984; 0.09998; 0.119976; 0.139972; 0.159968; 0.179964
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]
VAX[:, 1] = [
    0; 0; 0; 0; 0; 0; 0; 0; 0; 0
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]
VAX[:, 0][3] = 0.059988
VAX[:, 1][3] = 0
Id3 := max(VAX[:, 1])
nMax := match(Id3, VAX[:, 1])
Ud3 := VAX[:, 0][50]
Id3 = 0.206836
nMax = [50]
Ud3 = 0.793005
Id3/4 = 0.051709
Id3/2 = 0.103418
Ud1 := linterp(VAX[:, 0], VAX[:, 1], Id3/4)
Ud2 := linterp(VAX[:, 0], VAX[:, 1], Id3/2)
Ud1 := 0.76065
Ud2 := 0.77535
Id1 := Id3/4
Id2 := Id3/2
Id1 := 0.059199
Id2 := 0.1045
Rb := (Ud1 - 2*Ud2 + Ud3)/Id1
Rb = 0.0499215
NFt := ((3*Ud2 - 2*Ud1) - Ud3)/ln(2)
NFt = 0.016944
Is0 := Id1*exp((Ud2 - 2*Ud1)/NFt)
Is0 = 4.49541e-21
Rb := 0.2
Is0 := 0.00000000000001
m := 2
NFt := 0.0255
Given
0.79301 == 0.20684*Rb + ln((Is0 + 0.20684)/Is0)*m*NFt
0.78243 == 0.13741*Rb + ln((Is0 + 0.13741)/Is0)*m*NFt
0.75403 == 0.045824*Rb + ln((Is0 + 0.045824)/Is0)*m*NFt
0.71113 == 0.0087266*Rb + ln((Is0 + 0.0087266)/Is0)*m*NFt
Diod_P := Minerr(Is0, Rb, m, NFt)
Diod_P = [0; -3.49585e-5; 1.35742; 0.0190564]
Idiod := 0, 10^-5 .. 0.028
Idiod =  # no stored result
Udiod(Idiod) := Idiod*Rb + NFt*ln((Idiod + Is0)/Is0)
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Iproverka := VAX[:, 1][45]
Iproverka = 0.120758
Udiod(Iproverka) = 0.792268
Idiod := VAX[:, 1]
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