i := 0 .. 10
FU := READPRN("C:\Users\a\Desktop\Основы электроники\Saves\Lab_2_mc.ano")
Vvar := (-FU[:, 0])
Fmax := FU[:, 1]
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FU = [
    1, 331520;
    1.5, 345522;
    2, 356373;
    2.5, 365202;
    3, 372553;
    3.5, 378853;
    4, 384298;
    4.5, 389082;
    5, 393360
]
Vvar = [-1; -1.5; -2; -2.5; -3; -3.5; -4; -4.5; -5]
Fmax = [331520; 345522; 356373; 365202; 372553; 378853; 384298; 389082; 393360]
Fr == 1/(2*pi*sqrt((Ck + Cd)*Lk))
Lk := 10^-3
Ck := 10^-10
pi := 3.14
Fr := Fmax
Cd := -(Ck*Lk - 1/(4*Fr^2*pi^2))/Lk
Cd = [1.30707e-10; 1.12388e-10; 9.96509e-11; 9.01145e-11; 8.26862e-11; 7.66602e-11; 7.16896e-11; 6.74936e-11; 6.387e-11]
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M := 0.5
VJ0 := 0.6
CJ0 := 10^-12
Given
Cd == CJ0*(1 - Vvar/VJ0)^(-M)
[CJ0; VJ0; M] := Minerr(CJ0, VJ0, M) = [2.16392e-10; 0.770072; 0.605794]
Cd_model(U) := CJ0*(1 - U/VJ0)^(-M)
U := -6, -5 .. -1
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