VAX := READPRN("C:\Users\a\Desktop\Хранилище\Андрей\Учёба\Основы электроники\Saves\Lab_4_3.lvm")
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VAX = [
    -0.00516667, -0.00052614;
    -0.004701, -0.000473218;
    -0.00423532, -0.000420295;
    -0.00376965, -0.000367373;
    -0.00330397, -0.000314451;
    -0.00283829, -0.000261528;
    -0.00237262, -0.000208606;
    -0.00190694, -0.000155683;
    -0.00144127, -0.000102761;
    -0.00097559, -4.98386e-5
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]
Rb := 1
m := 2
Imax := max(VAX[:, 1]) = 0.00935382
Imax/8 = 0.00116923
Is0 := 0.0000001
Ft := 0.02
Imax/2 = 0.00467691
Uk(Ik) := Ik*Rb + ln((Is0 + Ik)/Is0)*m*Ft
Imax/4 = 0.00233845
Given
0.048386 == 9.354*10^-3*Rb + ln((Is0 + 9.354*10^-3)/Is0)*m*Ft
0.029293 == 4.677*10^-3*Rb + ln((Is0 + 4.677*10^-3)/Is0)*m*Ft
0.01672 == 2.338*10^-3*Rb + ln((Is0 + 2.338*10^-3)/Is0)*m*Ft
0.012063 == 1.169*10^-3*Rb + ln((Is0 + 1.169*10^-3)/Is0)*m*Ft
[Is0; Rb; m; Ft] := Minerr(Is0, Rb, m, Ft) = [2.2491e-5; 4.06126; 1.23846; 0.00142324]
Udiod(Idiod) := Idiod*Rb + ln((Is0 + Idiod)/Is0)*Ft
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