VAX := READPRN("C:\Users\a\Desktop\Lab_4_5.lvm")
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VAX =  # no stored result
Rb := 1
m := 2
Imax := max(VAX[:, 1]) = 1.80231
Imax/8 = 0.225289
Is0 := 0.0000001
Ft := 0.02
Imax/2 = 0.901157
Uk(Ik) := Ik*Rb + ln((Is0 + Ik)/Is0)*m*Ft
Imax/4 = 0.450579
Given
0.3 == 1.8023*Rb + ln((Is0 + 1.8023)/Is0)*m*Ft
0.26498 == 0.91639*Rb + ln((Is0 + 0.91639)/Is0)*m*Ft
0.22902 == 0.45631*Rb + ln((Is0 + 0.45631)/Is0)*m*Ft
0.19779 == 0.25043*Rb + ln((Is0 + 0.25043)/Is0)*m*Ft
[Is0; Rb; m; Ft] := Minerr(Is0, Rb, m, Ft) = [0.00610104; -0.000859153; 1.23339; 0.0429515]
Udiod(Idiod) := Idiod*Rb + ln((Is0 + Idiod)/Is0)*Ft
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