FU := READPRN("D:\Storage\Andrew\Учёба\Основы электроники\Лаб_4\Lab_4_6.lvm")
match(max(FU[:, 1]), FU[:, 1]) = [3; 4; 5; 6]
Fmax := [FU[:, 0][4]; FU[:, 2][5]; FU[:, 4][5]; FU[:, 6][6]; FU[:, 8][6]] = [98519.6; 121150; 121150; 143779; 143779]
Vvar := [0; 3.25; 5.5; 7.75; 10]
match(max(FU[:, 3]), FU[:, 3]) = [4; 5; 6]
FU =  # no stored result
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match(max(FU[:, 5]), FU[:, 5]) = [5; 6]
match(max(FU[:, 7]), FU[:, 7]) = [6]
Lk := 10^-3
Ck := 10^-10
pi := 3.14
match(max(FU[:, 9]), FU[:, 9]) = [6; 7]
Cd := -((Ck*Lk - 1/(4*Fmax^2*pi^2))/Lk)
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Cd = [2.51237e-9; 1.62758e-9; 1.62758e-9; 1.12656e-9; 1.12656e-9]
CJ0 := 1*10^-11
VJ0 := 3
M := 0.5
Given
(1.628*10^-9) == CJ0*(1 - 3.25/VJ0)^(-M)
(1.628*10^-9) == CJ0*(1 - 5.5/VJ0)^(-M)
(1.127*10^-9) == CJ0*(1 - 7.75/VJ0)^(-M)
(1.127*10^-9) == CJ0*(1 - 10/VJ0)^(-M)
[CJ0; VJ0; M] := Minerr(CJ0, VJ0, M) = [1.71692e-9 + 2.81518e-9i; 0.358555 + 1.45752e-14i; 0.322932 + 0.00329995i]
CJ0_base := 2.789*10^-9
CJ0 = 1.71692e-9 + 2.81518e-9i
VJ0 = 0.358555 + 1.45752e-14i
VJ0_base := 0.75
M = 0.322932 + 0.00329995i
M_base := 0.38
